*Heading
** Job name: PlainStrainViscoElastic_UMAT Model name: Model-1
** Generated by: Abaqus/CAE 2020
*Preprint, echo=NO, model=NO, history=NO, contact=NO
**
** PARTS
**
*Part, name=Part-1
*Node
      1,           0.,           0.
      2,  0.100000001,           0.
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*Element, type=CPE4
  1,   1,   2,  13,  12
  2,   2,   3,  14,  13
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*Nset, nset=Set-1, generate
   1,  121,    1
*Elset, elset=Set-1, generate
   1,  100,    1
** Section: Section-1
*Solid Section, elset=Set-1, material=Material-1
1.,
*End Part
**
**
** ASSEMBLY
**
*Assembly, name=Assembly
**
*Instance, name=Part-1-1, part=Part-1
*End Instance
**
*Nset, nset=Set-1, instance=Part-1-1, generate
  1,  11,   1
*Elset, elset=Set-1, instance=Part-1-1, generate
  1,  10,   1
*Nset, nset=Set-2, instance=Part-1-1, generate
 111,  121,    1
*Elset, elset=Set-2, instance=Part-1-1, generate
  91,  100,    1
*Nset, nset=_PickedSet6, internal, instance=Part-1-1, generate
  1,  11,   1
*Elset, elset=_PickedSet6, internal, instance=Part-1-1, generate
  1,  10,   1
*End Assembly
*Amplitude, name=Amp-1-rise
             0.,              0.,              5.,              1.
*Amplitude, name=Amp-2-Sustain
             0.,              1.,             50.,              1.
*Amplitude, name=Amp-3-fall
             0.,              1.,              5.,              0.
**
** MATERIALS
**
*Material, name=Material-1
*Density
2700.,
*Elastic, moduli=INSTANTANEOUS
 1e+09,0.
*Viscoelastic, time=PRONY
 0.2,  0., 10.
 0.1,  0.,100.
**
** BOUNDARY CONDITIONS
**
** Name: BC-1-fixed Type: Displacement/Rotation
*Boundary
_PickedSet6, 1, 1
_PickedSet6, 2, 2
_PickedSet6, 6, 6
** ----------------------------------------------------------------
**
** STEP: Step-1-rise
**
*Step, name=Step-1-rise, nlgeom=YES, inc=1000
First Stage
*Dynamic
0.1,5.,1e-12
**
** BOUNDARY CONDITIONS
**
** Name: BC-2-rise Type: Displacement/Rotation
*Boundary, amplitude=Amp-1-rise
Set-2, 2, 2, 0.01
**
** OUTPUT REQUESTS
**
*Restart, write, frequency=0
**
** FIELD OUTPUT: F-Output-1
**
*Output, field, variable=PRESELECT
**
** HISTORY OUTPUT: H-Output-1
**
*Output, history, variable=PRESELECT
*End Step
** ----------------------------------------------------------------
**
** STEP: Step-2-sustain
**
*Step, name=Step-2-sustain, nlgeom=YES, inc=1000
*Dynamic
0.1,50.,1e-12
**
** BOUNDARY CONDITIONS
**
** Name: BC-3-sustain Type: Displacement/Rotation
*Boundary, amplitude=Amp-2-Sustain
Set-2, 2, 2, 0.01
**
** OUTPUT REQUESTS
**
*Restart, write, frequency=0
**
** FIELD OUTPUT: F-Output-1
**
*Output, field, variable=PRESELECT
**
** HISTORY OUTPUT: H-Output-1
**
*Output, history, variable=PRESELECT
*End Step
** ----------------------------------------------------------------
**
** STEP: Step-3-fall
**
*Step, name=Step-3-fall, nlgeom=YES, inc=1000
Third Stage
*Dynamic
0.1,5.,1e-12
**
** BOUNDARY CONDITIONS
**
** Name: BC-4-fall Type: Displacement/Rotation
*Boundary, amplitude=Amp-3-fall
Set-2, 2, 2, 0.01
**
** OUTPUT REQUESTS
**
*Restart, write, frequency=0
**
** FIELD OUTPUT: F-Output-1
**
*Output, field, variable=PRESELECT
**
** HISTORY OUTPUT: H-Output-1
**
*Output, history, variable=PRESELECT
*End Step
** ----------------------------------------------------------------
**
** STEP: Step-4-final stage
**
*Step, name="Step-4-final stage", nlgeom=YES, inc=1000
Final Stage
*Dynamic
0.1,50.,1e-12
**
** BOUNDARY CONDITIONS
**
** Name: BC-5-sustain Type: Displacement/Rotation
*Boundary, amplitude=Amp-2-Sustain
Set-2, 2, 2
**
** OUTPUT REQUESTS
**
*Restart, write, frequency=0
**
** FIELD OUTPUT: F-Output-1
**
*Output, field, variable=PRESELECT
**
** HISTORY OUTPUT: H-Output-1
**
*Output, history, variable=PRESELECT
*End Step
