*Heading
** Job name: DSR_ABAQUS Model name: Model-1
** Generated by: Abaqus/CAE 2022
*Preprint, echo=NO, model=NO, history=NO, contact=NO
**
** PARTS
**
*Part, name=Part-1
*Node
      1, 0.00393148884, -0.000737154158,           0.
      2, 0.00393148884, -0.000737154158, 0.00200000009
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*Element, type=C3D10
   1,  664,  665,  666,  667, 1410, 1409, 1408, 1412, 1411, 1413
   2,  664,  668,  667,  669, 1415, 1414, 1412, 1417, 1416, 1418
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*Nset, nset=_PickedSet2, internal, generate
    1,  9787,     1
*Elset, elset=_PickedSet2, internal, generate
    1,  6313,     1
** Section: Section-1
*Solid Section, elset=_PickedSet2, controls=EC-1, material=Material-1
,
*End Part
**
*Part, name=Part-2
*Node
      1, 0.00357770873, -0.00178885437, 0.00150000001
      2, 0.00357770873, -0.00178885437,           0.
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*Element, type=R3D3
  1,   1,   3, 101
  2, 101, 150,   1
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*Node
    612,           0., -2.44929368e-19, 0.00150000001
*Nset, nset=Part-2-RefPt_, internal
612,
*Elset, elset=Part-2, generate
    1,  1218,     1
*End Part
**
*Part, name=Part-3
*Node
      1, 0.00337464595, -0.00214750203, 0.00150000001
      2, 0.00337464595, -0.00214750203,           0.
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*Element, type=R3D3
  1,   1,   3, 101
  2, 101, 150,   1
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*Node
    619,           0., 2.44929368e-19,           0.
*Nset, nset=Part-3-RefPt_, internal
619,
*Elset, elset=Part-3, generate
    1,  1232,     1
*End Part
**
**
** ASSEMBLY
**
*Assembly, name=Assembly
**
*Instance, name=Part-1-1, part=Part-1
*End Instance
**
*Instance, name=Part-2-1, part=Part-2
-1.04083408558608e-17,           0.,        0.002
*End Instance
**
*Instance, name=Part-3-1, part=Part-3
          0.,           0.,      -0.0015
*End Instance
**
*Nset, nset=RPB, instance=Part-3-1
 619,
*Nset, nset=RPT, instance=Part-2-1
 612,
*Nset, nset=_PickedSet19, internal, instance=Part-2-1
 612,
*Nset, nset=_PickedSet20, internal, instance=Part-3-1
 619,
*Elset, elset=_CP-1-Part-1-1_S3, internal, instance=Part-1-1
   19,  293,  605,  675,  762,  790
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*Elset, elset=_CP-1-Part-1-1_S1, internal, instance=Part-1-1
  132, 1368, 1670, 1728, 1773, 1784
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*Elset, elset=_CP-1-Part-1-1_S2, internal, instance=Part-1-1
  459, 1263, 1587, 1736, 1801, 1863
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*Elset, elset=_CP-1-Part-1-1_S4, internal, instance=Part-1-1
 1373, 1661, 1718, 1941, 2044, 2338
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*Surface, type=ELEMENT, name=CP-1-Part-1-1
_CP-1-Part-1-1_S3, S3
_CP-1-Part-1-1_S1, S1
_CP-1-Part-1-1_S2, S2
_CP-1-Part-1-1_S4, S4
*Elset, elset=_CP-1-Part-2-1_SNEG, internal, instance=Part-2-1, generate
   1,  300,    1
*Surface, type=ELEMENT, name=CP-1-Part-2-1
_CP-1-Part-2-1_SNEG, SNEG
*Elset, elset=_CP-2-Part-1-1_S3, internal, instance=Part-1-1
   60,   70,  183,  378,  401,  486
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*Elset, elset=_CP-2-Part-1-1_S2, internal, instance=Part-1-1
   61,  121, 1611, 1873, 2010, 2763
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*Elset, elset=_CP-2-Part-1-1_S1, internal, instance=Part-1-1
  133,  277, 1317, 1830, 2944, 3188
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*Elset, elset=_CP-2-Part-1-1_S4, internal, instance=Part-1-1
  203,  692, 1010, 1807, 1813, 1819
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*Surface, type=ELEMENT, name=CP-2-Part-1-1
_CP-2-Part-1-1_S3, S3
_CP-2-Part-1-1_S2, S2
_CP-2-Part-1-1_S4, S4
_CP-2-Part-1-1_S1, S1
*Elset, elset=_CP-2-Part-2-1_SPOS, internal, instance=Part-2-1, generate
  757,  1218,     1
*Surface, type=ELEMENT, name=CP-2-Part-2-1
_CP-2-Part-2-1_SPOS, SPOS
*Elset, elset=_CP-3-Part-1-1_S3, internal, instance=Part-1-1
   19,  293,  605,  675,  762,  790
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*Elset, elset=_CP-3-Part-1-1_S1, internal, instance=Part-1-1
  132, 1368, 1670, 1728, 1773, 1784
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*Elset, elset=_CP-3-Part-1-1_S2, internal, instance=Part-1-1
  459, 1263, 1587, 1736, 1801, 1863
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*Elset, elset=_CP-3-Part-1-1_S4, internal, instance=Part-1-1
 1373, 1661, 1718, 1941, 2044, 2338
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*Surface, type=ELEMENT, name=CP-3-Part-1-1
_CP-3-Part-1-1_S3, S3
_CP-3-Part-1-1_S1, S1
_CP-3-Part-1-1_S2, S2
_CP-3-Part-1-1_S4, S4
*Elset, elset=_CP-3-Part-3-1_SNEG, internal, instance=Part-3-1, generate
   1,  300,    1
*Surface, type=ELEMENT, name=CP-3-Part-3-1
_CP-3-Part-3-1_SNEG, SNEG
*Elset, elset=_CP-4-Part-1-1_S3, internal, instance=Part-1-1
  132,  145,  253,  408,  445,  459
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*Elset, elset=_CP-4-Part-1-1_S2, internal, instance=Part-1-1
  140, 1588, 1601, 1710, 1787, 1856
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*Elset, elset=_CP-4-Part-1-1_S1, internal, instance=Part-1-1
  438,  965, 1038, 1587, 1598, 2797, 3745, 3748, 4507, 4965, 5106, 6298
*Elset, elset=_CP-4-Part-1-1_S4, internal, instance=Part-1-1
  491, 1044, 1670, 1687, 1780, 2141
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*Surface, type=ELEMENT, name=CP-4-Part-1-1
_CP-4-Part-1-1_S3, S3
_CP-4-Part-1-1_S2, S2
_CP-4-Part-1-1_S4, S4
_CP-4-Part-1-1_S1, S1
*Elset, elset=_CP-4-Part-3-1_SPOS, internal, instance=Part-3-1, generate
 301,  768,    1
*Surface, type=ELEMENT, name=CP-4-Part-3-1
_CP-4-Part-3-1_SPOS, SPOS
*Rigid Body, ref node=Part-2-1.Part-2-RefPt_, elset=Part-2-1.Part-2
*Rigid Body, ref node=Part-3-1.Part-3-RefPt_, elset=Part-3-1.Part-3
*End Assembly
**
** ELEMENT CONTROLS
**
*Section Controls, name=EC-1, DISTORTION CONTROL=YES
1., 1., 1.
*Amplitude, name=Amp-1
             0.,              0.,         0.00025,     2.62233e-06,          0.0005,     5.49417e-06,         0.00075,     8.61554e-06
          0.001,     1.19864e-05,         0.00125,     1.56068e-05,          0.0015,     1.94767e-05,         0.00175,     2.35962e-05
          0.002,     2.79651e-05,         0.00225,     3.25836e-05,          0.0025,     3.74516e-05,         0.00275,     4.25691e-05
          0.003,     4.79362e-05,         0.00325,     5.35527e-05,          0.0035,     5.94188e-05,         0.00375,     6.55344e-05
          0.004,     7.18995e-05,         0.00425,     7.85142e-05,          0.0045,     8.53783e-05,         0.00475,      9.2492e-05
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          4.999,       0.0173856,         4.99925,       0.0124499,          4.9995,      0.00748307,         4.99975,      0.00249731
**
** MATERIALS
**
*Material, name=Material-1
*Density
1010.,
*Depvar
    150,
*User Material, constants=23
 3.73e+07,       0.35,        10.,   0.108015, 0.00804961,   0.106384,  0.0101843,   0.106305
  0.0102983,  0.0263395,    1.02601,   0.115562,   0.100772,   0.108539, 0.00743151,   0.107561
 0.00860657,   0.105903,  0.0108982,   0.108081, 0.00797005,   0.105834,  0.0110047
**
** INTERACTION PROPERTIES
**
*Surface Interaction, name=IntProp-1
1.,
*Cohesive Behavior
 1e+13, 1e+13, 1e+13
**
** INTERACTIONS
**
** Interaction: CP-2-Part-2-1-Part-1-1
*Contact Pair, interaction=IntProp-1, small sliding, type=SURFACE TO SURFACE
CP-2-Part-1-1, CP-2-Part-2-1
** Interaction: CP-4-Part-3-1-Part-1-1
*Contact Pair, interaction=IntProp-1, small sliding, type=SURFACE TO SURFACE
CP-4-Part-1-1, CP-4-Part-3-1
** ----------------------------------------------------------------
**
** STEP: Step-1
**
*Step, name=Step-1, nlgeom=YES, inc=100000000
*Dynamic
0.01,5.,1e-12,0.01
**
** BOUNDARY CONDITIONS
**
** Name: BC-2 Type: Displacement/Rotation
*Boundary, amplitude=Amp-1
_PickedSet19, 1, 1
_PickedSet19, 2, 2
_PickedSet19, 3, 3
_PickedSet19, 4, 4
_PickedSet19, 5, 5
_PickedSet19, 6, 6, -1.
** Name: BC-3 Type: Displacement/Rotation
*Boundary
_PickedSet20, 1, 1
_PickedSet20, 2, 2
_PickedSet20, 3, 3
_PickedSet20, 4, 4
_PickedSet20, 5, 5
_PickedSet20, 6, 6
**
** OUTPUT REQUESTS
**
*Restart, write, frequency=0
**
** FIELD OUTPUT: F-Output-1
**
*Output, field, variable=PRESELECT
**
** HISTORY OUTPUT: H-Output-2
**
*Output, history, frequency=1
*Node Output, nset=RPB
RM3, UR3
**
** HISTORY OUTPUT: H-Output-1
**
*Node Output, nset=RPT
RM3, UR3
*End Step
